<neuroml xmlns="http://www.neuroml.org/schema/neuroml2"  xmlns:xs="http://www.w3.org/2001/XMLSchema" xmlns:xsi="http://www.w3.org/2001/XMLSchema-instance" xsi:schemaLocation="http://www.neuroml.org/schema/neuroml2 https://raw.github.com/NeuroML/NeuroML2/development/Schemas/NeuroML2/NeuroML_v2.3.1.xsd" id="AIY">
    <notes>A cell from Nicoletti et al. 2019</notes>
    <include href="leak.channel.nml"/>
    <include href="egl19.channel.nml"/>
    <cell id="AIY">
        <notes>AIY cell from Nicoletti et al. 2019</notes>
        <morphology id="morphology">
            <segment id="0" name="soma">
                <proximal x="0.0" y="0.0" z="0.0" diameter="9.159353339761484"/>
                <distal x="0.0" y="9.159353339761484" z="0.0" diameter="9.159353339761484"/>
            </segment>
            <segmentGroup id="soma_group" neuroLexId="GO:0043025">
                <notes>Default soma segment group for the cell</notes>
                <member segment="0"/>
            </segmentGroup>
            <segmentGroup id="all">
                <notes>Default segment group for all segments in the cell</notes>
                <member segment="0"/>
            </segmentGroup>
        </morphology>
        <biophysicalProperties id="biophys">
            <membraneProperties>
                <channelDensity id="leak_chans" ionChannel="leak" condDensity="0.14 S_per_m2" erev="-89.57mV" ion="non_specific"/>
                <channelDensity id="egl19_chans" ionChannel="egl19" condDensity="0.1 S_per_m2" erev="-89.57mV" ion="non_specific"/>
                <spikeThresh value="0mV"/>
                <specificCapacitance value="1.6 F_per_m2"/>
                <initMembPotential value="-70mV"/>
            </membraneProperties>
            <intracellularProperties>
                <resistivity value="0.1 kohm_cm"/>
            </intracellularProperties>
        </biophysicalProperties>
    </cell>
</neuroml>
