<Lems>

    <!--

        This LEMS file has been automatically generated using PyNeuroML v1.3.12 (libNeuroML v0.6.6)

     -->

    <!-- Specify which component to run -->
    <Target component="Sim_IClamp_AIY" reportFile="report.Sim_IClamp_AIY.txt"/>

    <!-- Include core NeuroML2 ComponentType definitions -->
    <Include file="Cells.xml"/>
    <Include file="Networks.xml"/>
    <Include file="Simulation.xml"/>

    <Include file="PyNN.xml"/>
    <Include file="IClamp_AIY.net.nml"/>
    <Include file="AIY.cell.nml"/>

    <Simulation id="Sim_IClamp_AIY" length="400.0ms" step="0.025ms" target="IClamp_AIY" seed="12345">  <!-- Note seed: ensures same random numbers used every run -->
        <Display id="pop_AIY_0_biophys/membraneProperties/egl19_chans/egl19/h/q" title="Plots of pop_AIY_0_biophys/membraneProperties/egl19_chans/egl19/h/q" timeScale="1ms" xmin="-40.0" xmax="440.00000000000006" ymin="-1" ymax="1">
            <Line id="pop_AIY_0_AIY_biophys_membraneProperties_egl19_chans_egl19_h_q" quantity="pop_AIY/0/AIY/biophys/membraneProperties/egl19_chans/egl19/h/q" scale="1" color="#d54f33" timeScale="1ms"/>
        </Display>

        <Display id="pop_AIY_0_biophys/membraneProperties/egl19_chans/egl19/m/q" title="Plots of pop_AIY_0_biophys/membraneProperties/egl19_chans/egl19/m/q" timeScale="1ms" xmin="-40.0" xmax="440.00000000000006" ymin="-1" ymax="1">
            <Line id="pop_AIY_0_AIY_biophys_membraneProperties_egl19_chans_egl19_m_q" quantity="pop_AIY/0/AIY/biophys/membraneProperties/egl19_chans/egl19/m/q" scale="1" color="#0534e4" timeScale="1ms"/>
        </Display>

        <Display id="pop_AIY_0_biophys/membraneProperties/egl19_chans/gDensity" title="Plots of pop_AIY_0_biophys/membraneProperties/egl19_chans/gDensity" timeScale="1ms" xmin="-40.0" xmax="440.00000000000006" ymin="-1" ymax="1">
            <Line id="pop_AIY_0_AIY_biophys_membraneProperties_egl19_chans_gDensity" quantity="pop_AIY/0/AIY/biophys/membraneProperties/egl19_chans/gDensity" scale="1" color="#98e752" timeScale="1ms"/>
        </Display>

        <Display id="pop_AIY_0_biophys/membraneProperties/egl19_chans/iDensity" title="Plots of pop_AIY_0_biophys/membraneProperties/egl19_chans/iDensity" timeScale="1ms" xmin="-40.0" xmax="440.00000000000006" ymin="-1" ymax="1">
            <Line id="pop_AIY_0_AIY_biophys_membraneProperties_egl19_chans_iDensity" quantity="pop_AIY/0/AIY/biophys/membraneProperties/egl19_chans/iDensity" scale="1" color="#bca074" timeScale="1ms"/>
        </Display>

        <Display id="pop_AIY_0_biophys/membraneProperties/leak_chans/gDensity" title="Plots of pop_AIY_0_biophys/membraneProperties/leak_chans/gDensity" timeScale="1ms" xmin="-40.0" xmax="440.00000000000006" ymin="-1" ymax="1">
            <Line id="pop_AIY_0_AIY_biophys_membraneProperties_leak_chans_gDensity" quantity="pop_AIY/0/AIY/biophys/membraneProperties/leak_chans/gDensity" scale="1" color="#632794" timeScale="1ms"/>
        </Display>

        <Display id="pop_AIY_0_biophys/membraneProperties/leak_chans/iDensity" title="Plots of pop_AIY_0_biophys/membraneProperties/leak_chans/iDensity" timeScale="1ms" xmin="-40.0" xmax="440.00000000000006" ymin="-1" ymax="1">
            <Line id="pop_AIY_0_AIY_biophys_membraneProperties_leak_chans_iDensity" quantity="pop_AIY/0/AIY/biophys/membraneProperties/leak_chans/iDensity" scale="1" color="#8a5d88" timeScale="1ms"/>
        </Display>

        <Display id="pop_AIY_0_caConc" title="Plots of pop_AIY_0_caConc" timeScale="1ms" xmin="-40.0" xmax="440.00000000000006" ymin="-1" ymax="1">
            <Line id="pop_AIY_0_AIY_caConc" quantity="pop_AIY/0/AIY/caConc" scale="1" color="#df5954" timeScale="1ms"/>
        </Display>

        <Display id="pop_AIY_v" title="Plots of pop_AIY_v" timeScale="1ms" xmin="-40.0" xmax="440.00000000000006" ymin="-80" ymax="40">
            <Line id="pop_AIY_0_AIY_v" quantity="pop_AIY/0/AIY/v" scale="1mV" color="#52c8bf" timeScale="1ms"/>
        </Display>

        <OutputFile id="Sim_IClamp_AIY_pop_AIY_v_dat" fileName="Sim_IClamp_AIY.pop_AIY.v.dat">
            <OutputColumn id="pop_AIY_0_AIY_v" quantity="pop_AIY/0/AIY/v"/>
        </OutputFile>

        <OutputFile id="pop_AIY_0_biophys_membraneProperties_egl19_chans_egl19_h_q_dat" fileName="pop_AIY_0.biophys_membraneProperties_egl19_chans_egl19_h_q.dat">
            <OutputColumn id="pop_AIY_0_AIY_biophys_membraneProperties_egl19_chans_egl19_h_q" quantity="pop_AIY/0/AIY/biophys/membraneProperties/egl19_chans/egl19/h/q"/>
        </OutputFile>

        <OutputFile id="pop_AIY_0_biophys_membraneProperties_egl19_chans_egl19_m_q_dat" fileName="pop_AIY_0.biophys_membraneProperties_egl19_chans_egl19_m_q.dat">
            <OutputColumn id="pop_AIY_0_AIY_biophys_membraneProperties_egl19_chans_egl19_m_q" quantity="pop_AIY/0/AIY/biophys/membraneProperties/egl19_chans/egl19/m/q"/>
        </OutputFile>

        <OutputFile id="pop_AIY_0_biophys_membraneProperties_egl19_chans_gDensity_dat" fileName="pop_AIY_0.biophys_membraneProperties_egl19_chans_gDensity.dat">
            <OutputColumn id="pop_AIY_0_AIY_biophys_membraneProperties_egl19_chans_gDensity" quantity="pop_AIY/0/AIY/biophys/membraneProperties/egl19_chans/gDensity"/>
        </OutputFile>

        <OutputFile id="pop_AIY_0_biophys_membraneProperties_egl19_chans_iDensity_dat" fileName="pop_AIY_0.biophys_membraneProperties_egl19_chans_iDensity.dat">
            <OutputColumn id="pop_AIY_0_AIY_biophys_membraneProperties_egl19_chans_iDensity" quantity="pop_AIY/0/AIY/biophys/membraneProperties/egl19_chans/iDensity"/>
        </OutputFile>

        <OutputFile id="pop_AIY_0_biophys_membraneProperties_leak_chans_gDensity_dat" fileName="pop_AIY_0.biophys_membraneProperties_leak_chans_gDensity.dat">
            <OutputColumn id="pop_AIY_0_AIY_biophys_membraneProperties_leak_chans_gDensity" quantity="pop_AIY/0/AIY/biophys/membraneProperties/leak_chans/gDensity"/>
        </OutputFile>

        <OutputFile id="pop_AIY_0_biophys_membraneProperties_leak_chans_iDensity_dat" fileName="pop_AIY_0.biophys_membraneProperties_leak_chans_iDensity.dat">
            <OutputColumn id="pop_AIY_0_AIY_biophys_membraneProperties_leak_chans_iDensity" quantity="pop_AIY/0/AIY/biophys/membraneProperties/leak_chans/iDensity"/>
        </OutputFile>

        <OutputFile id="pop_AIY_0_caConc_dat" fileName="pop_AIY_0.caConc.dat">
            <OutputColumn id="pop_AIY_0_AIY_caConc" quantity="pop_AIY/0/AIY/caConc"/>
        </OutputFile>

    </Simulation>

</Lems>
